# Fysiske dimensioner:
d_1 := 16.5
a_1 := 0
d_4 := 24.5
a_2 := 17.5
# Koordinater:
xc := 25
yc := -25
zc := 5
# Joint1 posistion:
q1 := atan(yc/xc) = -0.785398
# Hjælpe formler (Udleveret af underviser):
r_2 := (xc^2 - (a_1*cos(q1))^2) + (yc^2 - (a_1*sin(q1))^2) = 1250
s := (zc - d_1) = -11.5
D := (((r_2 + s^2) - a_2^2 - d_4^2)/(2*a_2*d_4)) = 0.55481
# Joint3 posistion:
q3 := atan(-sqrt(1 - D^2)/D) = -0.982661
# Joint2 posistion:
q2 := -(π/2 - (atan(s/sqrt(r_2)) - atan(d_4*sin(q3)/(a_2 + d_4*cos(q3))))) = -1.30499
q2/(2*π)*360 = -74.7706
q2 := (atan(s/sqrt(r_2)) - atan(d_4*sin(q3)/(a_2 + d_4*cos(q3)))) = 0.265803
q2/(2*π)*360 = 15.2294
